// SBML level 3 version 1

model sars_cov2_infection()

  // Compartments:
  compartment default_compartment = 1;

  // Species:
  species gen_ssRNA in default_compartment = 0;
  species rep_ssRNA in default_compartment = 1/default_compartment;
  species envelope in default_compartment = 0;
  species virus_free in default_compartment = 0;
  species $ACE2 in default_compartment = 100;
  species virus_bound in default_compartment = 0;

  // Parameters:
  k1 = 0.968;
  k2 = 0.025;
  k3 = 1000;
  k4 = 0.222;
  k5 = 2;
  k6 = 7.5e-6;
  k7 = 0.112;

  // Reactions:
  production_genomic_ssRNA: -> gen_ssRNA; k1*rep_ssRNA;  // modifiers: rep_ssRNA
  transcription_genomic_ssRNA: gen_ssRNA -> rep_ssRNA; k2*gen_ssRNA;
  translation_of_viral_envelope: -> envelope; k3*rep_ssRNA;  // modifiers: rep_ssRNA
  degradation_of_ssRNA: rep_ssRNA -> ; k4*rep_ssRNA;
  degradation_of_envelope: envelope -> ; k5*envelope;
  formation_of_free_virus_complex: gen_ssRNA + envelope -> virus_free; k6*gen_ssRNA*envelope;
  binding_of_virus_complex_to_host: virus_free + $ACE2 -> virus_bound; k7*virus_free*ACE2;
end
